*Heading
** FIELD-VARIABLE PROBE for vumat_grind.for
** Eight C3D8R cubes of 0.0003 mm, one per injected chip thickness.
** Material card copied verbatim from multi_abrasive_field.inp
** material: silicon_carbide     dc = 5.292000e-05 mm (52.9200 nm)
**
** WHAT THIS ANSWERS
**   SDV14 must come back as the h injected into each element.
**   SDV13 must be 1 (ductile) where h < dc and 2 (brittle) above.
**   If every SDV14 is zero, field variable 1 is NOT reaching the
**   VUMAT, and every field-carrying deck in this project is
**   running 100%% ductile while looking entirely healthy.
**
** element   h/dc        h [mm]
**   1        0.10        5.292000000e-06
**   2        0.50        2.646000000e-05
**   3        0.90        4.762800000e-05
**   4        0.99        5.239080000e-05
**   5        1.01        5.344920000e-05
**   6        1.10        5.821200000e-05
**   7        2.00        1.058400000e-04
**   8        5.00        2.646000000e-04
**
*Part, name=P
*Node
1, 0.000000000000e+00, 0.000000000000e+00, 0.000000000000e+00
2, 3.000000000000e-04, 0.000000000000e+00, 0.000000000000e+00
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*Element, type=C3D8R
1, 1, 2, 3, 4, 5, 6, 7, 8
2, 9, 10, 11, 12, 13, 14, 15, 16
3, 17, 18, 19, 20, 21, 22, 23, 24
4, 25, 26, 27, 28, 29, 30, 31, 32
5, 33, 34, 35, 36, 37, 38, 39, 40
6, 41, 42, 43, 44, 45, 46, 47, 48
7, 49, 50, 51, 52, 53, 54, 55, 56
8, 57, 58, 59, 60, 61, 62, 63, 64
*Elset, elset=ALL, generate
1, 8, 1
*Solid Section, elset=ALL, material=PROBE, controls=EC-1
,
*End Part
**
*Assembly, name=A
*Instance, name=P-1, part=P
*End Instance
*Nset, nset=NS1, instance=P-1
1, 2, 3, 4, 5, 6, 7, 8
*Nset, nset=NS2, instance=P-1
9, 10, 11, 12, 13, 14, 15, 16
*Nset, nset=NS3, instance=P-1
17, 18, 19, 20, 21, 22, 23, 24
*Nset, nset=NS4, instance=P-1
25, 26, 27, 28, 29, 30, 31, 32
*Nset, nset=NS5, instance=P-1
33, 34, 35, 36, 37, 38, 39, 40
*Nset, nset=NS6, instance=P-1
41, 42, 43, 44, 45, 46, 47, 48
*Nset, nset=NS7, instance=P-1
49, 50, 51, 52, 53, 54, 55, 56
*Nset, nset=NS8, instance=P-1
57, 58, 59, 60, 61, 62, 63, 64
*Nset, nset=BOT, instance=P-1
1, 2, 3, 4, 9, 10
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*Nset, nset=TOP, instance=P-1
5, 6, 7, 8, 13, 14
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*End Assembly
**
*Material, name=PROBE
*Density
3.16300000e-09,
*Depvar, delete=12
20,
*User Material, constants=56
204785.0, 183000.0, 14457.0, 5900.0, 370.0, 0.96, 0.35, 0.0
0.65, 1.0, 1.0, 0.48, 0.48, 0.0, 0.0, 0.8
12835.5, 1.0, 1.0, 1.0, -1.0, 8004.22274169057, 800.0, 0.35
0.0, 1.0, 1.0, 450000.0, 0.16, 3.163e-09, 690000000.0, 0.9
293.15, 3103.15, 3.08e-07, 3.0, 0.3, 1.0, 2.0, 0.0
0.0, 0.15, -1.5, 0.0, 0.0, 1.0, 5.291999999999998e-05, 0.15
25000.0, 110.67971810589327, 2.0, 0.04, 5.4359871254358256e-05, -0.0037034448925679386, 25.00174709725184, 1.0
**
*Section Controls, name=EC-1, hourglass=ENHANCED, ELEMENT DELETION=YES
1., 1., 1.
**
** The whole point. variable=1 is what PROPS(56)=1 reads.
*Initial Conditions, type=FIELD, variable=1
NS1, 5.291999999999999e-06
NS2, 2.645999999999999e-05
NS3, 4.7627999999999985e-05
NS4, 5.239079999999998e-05
NS5, 5.344919999999998e-05
NS6, 5.8211999999999984e-05
NS7, 0.00010583999999999996
NS8, 0.0002645999999999999
**
*Step, name=S1, nlgeom=YES
*Dynamic, Explicit
, 2.000000000e-07
*Bulk Viscosity
0.06, 1.2
*Boundary
BOT, 1, 3
*Boundary, type=VELOCITY
TOP, 2, 2, -3.000000000e+02
TOP, 1, 1
TOP, 3, 3
*Output, field, number interval=20
*Node Output
U, V
*Element Output, directions=YES
S, SDV, STATUS
*Output, history, time interval=1.000000000e-09
*Energy Output
ALLIE, ALLKE, ALLAE, ALLPD
*End Step
