*Heading
** multi_abrasive
** Run-ready: two parts, the assembly, sets and surfaces, plus the step,
** contact, boundary conditions and output requests.
** Units: mm, tonne, s, MPa, N.   Wheel axis = Z.
**
** WHEEL      : ONE discrete rigid body -- bond rim shell (R3D4) plus every
**              grit facet (R3D3), all tied to reference node 3565 at the
**              origin on the wheel axis. Rotate the wheel with a single BC
**              on WHEEL-1.WHEEL_REF. VR3 = -omega turns the surface toward
**              decreasing theta (+Y toward +X), so grits arrive at
**              the workpiece from its high-theta end.
** WORKPIECE  : the only deformable part, C3D8R, material SIC.
**
** wheel outer radius (mm)     : 25.000000   (diameter 50)
** sector (deg)                : 4.583662
** arc length (mm)             : 2.000000
** rim depth (mm)              : 0.012000
** sagitta of the arc (um)     : 20.000  = 167% of the rim depth
** wheel axial width (mm)      : 0.03
** grits                       : 12  (1452 R3D3 facets)
** rigid-body mass (tonne)     : 1.943533e-12
** tallest grit tip, whole arc : r = 25.001803 mm
** grits able to engage        : 12  (within 0.0780 mm arc of the block)
** governing grit in footprint : placement 10, r = 25.001743 mm
** workpiece ground face at    : r = 25.001743 mm  (tangent, penetration 0)
** initial clearance (um)      : 0
** workpiece (mm)              : 0.048 x 0.02 x 0.006
** workpiece elements          : 54080 C3D8R  (160 x 13 x 26)
** element size (um)           : 0.3000 cutting x 1.5385 axial x 0.0300 depth
** governs the stable dt (um)  : 0.0300  (the smallest of the three)
** workpiece centre at theta   : 2.291831 deg
**
** To cut, move WHEEL_REF radially inward by the depth of cut before or
** at the start of the step; the grits already graze the surface.
**
*Part, name=WHEEL
*Node
1, 2.498800000000e+01, 0.000000000000e+00, -1.500000000000e-02
2, 2.498800000000e+01, 0.000000000000e+00, -1.000000000000e-02
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*Element, type=R3D4
1, 1408, 1415, 1416, 1409
2, 1, 2, 9, 8
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*Element, type=R3D3
2813, 2815, 2829, 2828
2814, 2815, 2817, 2816
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*Elset, elset=ES_WHEEL_ALL, generate
1, 4264, 1
*Elset, elset=ES_GRITS, generate
2813, 4264, 1
*Elset, elset=ES_BOND_OUTER
1, 3, 5, 7, 9, 11
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*Elset, elset=ES_BOND_BORE
2, 4, 6, 8, 10, 12
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*Elset, elset=ES_BOND_ZMIN
2401, 2403, 2405, 2407, 2409, 2411
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*Elset, elset=ES_BOND_ZMAX
2402, 2404, 2406, 2408, 2410, 2412
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*Elset, elset=ES_BOND_SECTOR_START
2801, 2803, 2805, 2807, 2809, 2811
*Elset, elset=ES_BOND_SECTOR_END
2802, 2804, 2806, 2808, 2810, 2812
*Element, type=MASS, elset=ES_WHEEL_MASS
4265, 3565
*Mass, elset=ES_WHEEL_MASS
1.943533440e-12,
*Element, type=ROTARYI, elset=ES_WHEEL_ROTI
4266, 3565
*Rotary Inertia, elset=ES_WHEEL_ROTI
2.586966770e-12, 1.211538805e-09, 1.214125480e-09, -4.846150219e-11, 0.000000000e+00, 0.000000000e+00
*Nset, nset=WHEEL_REF
3565,
*Rigid Body, ref node=WHEEL_REF, elset=ES_WHEEL_ALL
*Surface, type=ELEMENT, name=WHEEL_SURF
ES_GRITS, SPOS
ES_BOND_OUTER, SPOS
*Surface, type=ELEMENT, name=GRITS_SURF
ES_GRITS, SPOS
*End Part
*Part, name=WORKPIECE
*Node
1, 2.498270437748e+01, 9.758222679690e-01, -1.000000000000e-02
2, 2.498273435348e+01, 9.758234676491e-01, -1.000000000000e-02
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*Element, type=C3D8R
1, 1, 379, 406, 28, 2, 380, 407, 29
2, 2, 380, 407, 29, 3, 381, 408, 30
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*Elset, elset=WP_ALL, generate
1, 54080, 1
*Solid Section, elset=WP_ALL, controls=EC-1, material=SIC
,
*Nset, nset=WP_GROUND_FACE
1, 28, 55, 82, 109, 136
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*Nset, nset=WP_BACK_FACE
27, 54, 81, 108, 135, 162
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*Nset, nset=WP_END_A
1, 2, 3, 4, 5, 6
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*Nset, nset=WP_END_B
60481, 60482, 60483, 60484, 60485, 60486
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*Nset, nset=WP_SIDE_A
1, 2, 3, 4, 5, 6
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*Nset, nset=WP_SIDE_B
352, 353, 354, 355, 356, 357
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*Nset, nset=WP_ALL_NODES
1, 2, 3, 4, 5, 6
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*Elset, elset=ES_WP_GROUND
1, 27, 53, 79, 105, 131
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*Surface, type=ELEMENT, name=WP_GROUND_SURF
ES_WP_GROUND, S1
*End Part
*Assembly, name=ASSEMBLY
*Instance, name=WHEEL-1, part=WHEEL
*End Instance
*Instance, name=WP-1, part=WORKPIECE
*End Instance
*Nset, nset=A_WHEEL_REF, instance=WHEEL-1
WHEEL_REF,
*Nset, nset=A_WP_GROUND_FACE, instance=WP-1
WP_GROUND_FACE,
*Nset, nset=A_WP_BACK_FACE, instance=WP-1
WP_BACK_FACE,
*Nset, nset=A_WP_END_A, instance=WP-1
WP_END_A,
*Nset, nset=A_WP_END_B, instance=WP-1
WP_END_B,
*Nset, nset=A_WP_SIDE_A, instance=WP-1
WP_SIDE_A,
*Nset, nset=A_WP_SIDE_B, instance=WP-1
WP_SIDE_B,
*Nset, nset=A_WP_ALL_NODES, instance=WP-1
WP_ALL_NODES,
*Elset, elset=A_WP_ALL, instance=WP-1
WP_ALL,
*Surface, type=ELEMENT, name=A_WHEEL_SURF
WHEEL-1.ES_GRITS, SPOS
WHEEL-1.ES_BOND_OUTER, SPOS
*Surface, type=ELEMENT, name=A_GRITS_SURF
WHEEL-1.ES_GRITS, SPOS
*Surface, type=ELEMENT, name=A_WP_GROUND_SURF
WP-1.ES_WP_GROUND, S1
*End Assembly
** The wheel is rigid, so it needs no section and no material.
**
** ---------------- HYBRID DUCTILE / BRITTLE MATERIAL --------------
** Johnson-Cook + strain-gradient enhancement where the grit takes a
** cut thinner than dc, Johnson-Holmquist II where it takes a thicker
** one. Requires vumat_grind.for:
**   abaqus job=... input=... user=vumat_grind.for double=both cpus=N
**
** critical depth of cut dc  : 5.292000e-05 mm  (52.9200 nm)
**   from   lambda_c*(E/H)*(Kc/H)^2  [Bifano 1991]
**   lambda_c 0.15, H 25000 MPa, E 450000 MPa, Kc 110.68 MPa*sqrt(mm)
** h source                  : h from field variable 1
**
** WARNING: the Johnson-Cook constants below are PLACEHOLDERS for
** this material. A is the JH-2 card's own quasi-static uniaxial
** compressive strength so the two branches meet at the
** transition, but B, n, C, m and D1..D5 are order-of-magnitude
** values. Calibrate them before quoting a force from this run.
**
*Material, name=SIC
*Density
3.16300000e-09,
*Depvar, delete=12
20,
**
** ---------------- ABLATION ARM: forced_brittle ----------------
** PROPS(56) h source 1 -> 3.
** Johnson-Holmquist II everywhere. Bit-identical to vumat_jh2.for, so this arm is the published brittle model on this geometry.
**
** ONE VALUE differs from the deck this was copied from. Same mesh,
** same grains, same seating, same field, same everything else --
** so any difference in the result is the constitutive law and
** nothing else. That is what makes this an ablation rather than a
** second model.
** WARNING, read before using this arm as a baseline.
** vumat_grind.for's heterogeneity guard reads
**     nfieldv .ge. 1 .and. ihmode .ne. 1
** which excludes only mode 1. This deck CARRIES a field, so in
** mode 3 that guard passes and the JH-2 intact strength is
** multiplied by the chip thickness in mm -- order 1e-4, measured
** at 9355x on the shipped card. So this arm is NOT the pure law;
** it is the pure law with the strength scaled by h.
**
** This is a constitutive question and has deliberately not been
** changed. To get a clean baseline, build the forced arms from a
** deck with no *Initial Conditions field (h_source = 0).
**
*User Material, constants=56
204785.0, 183000.0, 14457.0, 5900.0, 370.0, 0.96, 0.35, 0.0
0.65, 1.0, 1.0, 0.48, 0.48, 0.0, 0.0, 0.8
12835.5, 1.0, 1.0, 1.0, -1.0, 8004.22274169057, 800.0, 0.35
0.0, 1.0, 1.0, 450000.0, 0.16, 3.163e-09, 690000000.0, 0.9
293.15, 3103.15, 3.08e-07, 3.0, 0.3, 1.0, 2.0, 0.0
0.0, 0.15, -1.5, 0.0, 0.0, 1.0, 5.291999999999998e-05, 0.15
25000.0, 110.67971810589327, 2.0, 0.04, 5.4359871254358256e-05, -0.0037034448925679386, 25.00174709725184, 3.0
**
** ---------------- ANALYSIS ----------------
**
*Section Controls, name=EC-1, hourglass=ENHANCED, ELEMENT DELETION=YES
1., 1., 1.
*Surface Interaction, name=IntProp-1
*Friction
0.2,
**
*Boundary
A_WP_BACK_FACE, ENCASTRE
**
**
** ---------------- CHIP THICKNESS FIELD ----------------
** Undeformed chip thickness at every workpiece node, mm,
** swept from the grit trajectories before the run. Read by
** vumat_grind.for as field variable 1 because PROPS(56) = 1.
** swept from 10 of 12 grits, 2,364 surface points
** dc = 5.292000e-05 mm; of 454 elements cut, 146 ductile and 308 brittle
** deepest groove 0.1317 um, mean 0.0051 um
**
*Initial Conditions, type=FIELD, variable=1
WP-1.1, 0.00013172279588857805
WP-1.2, 0.00013172279588857805
WP-1.3, 0.00013172279588857805
WP-1.4, 0.00013172279588857805
WP-1.5, 0.00013172279588857805
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WP-1.60858, 6.865896651220282e-07
*Step, name=Step-1, nlgeom=YES
*Dynamic, Explicit
, 1.8e-06
*Bulk Viscosity
0.06, 1.2
*Fixed Mass Scaling, factor=10
**
** The wheel: one velocity BC on the single rigid-body reference node.
** DOF 1 and 2 are the radial infeed -- the depth of cut. Without them the
** wheel spins on the spot and never touches the workpiece.
*Boundary, type=VELOCITY
A_WHEEL_REF, 1, 1, 111.022234
A_WHEEL_REF, 2, 2, 4.443259
A_WHEEL_REF, 3, 3
A_WHEEL_REF, 4, 4
A_WHEEL_REF, 5, 5
A_WHEEL_REF, 6, 6, -1200.000000
**
*Contact, op=NEW
** contact scope promoted 'engaging' -> 'all exterior': element deletion is on, and a
** face-based surface cannot re-expose interior faces as elements
** die. See AnalysisParams.effective_contact_scope.
*Contact Inclusions, ALL EXTERIOR
*Contact Property Assignment
 ,  , IntProp-1
**
*Restart, write, number interval=10, time marks=NO
*Output, field, number interval=60
*Node Output
U, V
*Element Output, elset=A_WP_ALL, directions=YES
S, PEEQ, SDV, STATUS
*Output, history, variable=PRESELECT, time interval=9.000000000e-10
*Output, history, time interval=9.000000000e-10
*Node Output, nset=A_WHEEL_REF
RF1, RF2, RF3, RM1, RM2, RM3, U1, U2, UR3
*End Step
